# 1 Задание
1.
tan(1 + π/4) - cos(π/8) = -5.51192
2.
sqrt(1 + ln(1 + sin(π/4))) - 1 = 0.23887
# 2 Задание
# 2.1.
f(x) := 2*sqrt(x^2 + 2*x - 2.75) - x - 3
2, □
x0 := 10
f(x0) = 8.65641
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3.
4.
rf := root(f(x0), x0)
rf = 2.27008
5, □
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# 2.2.
f(x) := sqrt(3*x + 1) + sqrt(9 - x) - 6/sqrt(9 - x)
2, □
x0 := 8
f(x0) = 0
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3.
rf := root(f(x0), x0, 0, 8)
4.
rf = 8
5, □
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# 2.3
f(x) := e^(-x^2) + e^(2*x) - 4
2, □
x0 := 10
f(x0) = 485165191
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3.
4.
rf := root(f(x0), x0)
rf = 0.596923
5, □
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# 2.4.
f(x) := log(log(x, 10), 10) + log(log(x^3, 10) - 2, 10)
2, □
x0 := 10
f(x0) = 0
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3.
4.
rf := root(f(x0), x0)
rf = 10
5, □
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# 2.5
f(x) := nthroot(2*x/(x^2 + 1), 3) + nthroot((x + 1)/(x - 1), 3) - 1
2, □
x0 := 10
f(x0) = 0.652045
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3.
TOL := 1*10^-7
4.
rf := root(f(x0), x0)
rf = 1.04714e22
5, □
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# 3 Задание
# 3.1.
f(x) := 0.2*x^5 - 4*x^3 + 12*x^2 - 9
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v := f(x) coeffs → [-9; 0; 12; -4; 0; 0.2]
polyroots(v) = [-5.53023; -0.774468; 1.061; 2.62185 - 1.74027i; 2.62185 + 1.74027i]
# 3.2
f(x) := -6*x^4 + 18*x^2 - 3*x + 6
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v := f(x) coeffs → [6; -3; 18; 0; -6]
polyroots(v) = [-1.88345; 0.0696491 - 0.547323i; 0.0696491 + 0.547323i; 1.74415]
# 4 Задание
1.
x := 1
y := 0
Given
y^2 - x - 3*log(x) == 0
5*x + x*y - 2*x^2 == 1
[x; y] := Find(x, y)
x = 1.45889
y = -1.39677
(y^2 - x - 3*log(x)) = 3.33067e-16
(5*x + x*y - 2*x^2) - 1 = 0
x := 2
y := 2
Given
y^2 - x - 3*log(x) == 0
5*x + x*y - 2*x^2 == 1
[x; y] := Find(x, y)
x = 3.48744
y = 2.26163
(y^2 - x - 3*log(x)) = 6.66134e-16
(5*x + x*y - 2*x^2) - 1 = 0
2
x1 := 1
y1 := 0
Given
sqrt(2*x1 - y1 + 11) - sqrt(3*x1 + y1 - 9) == 3
nthroot(2*x1 - y1 + 11, 4) + nthroot(3*x1 + y1 - 9, 4) == 3
Find(x1, y1) = [3; 1]
x := 3
y := 1
sqrt(2*x - y + 11) - sqrt(3*x + y - 9) - 3 = 0
nthroot(2*x - y + 11, 4) + nthroot(3*x + y - 9, 4) - 3 = 0
