# Задание 1.
F1(x1) := -e^(x1^2/3) - x1/2  # функция
f1(x1) := (d/dx1(F1(x1)))  # производная функции
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x1 := -0.5
v1 := root(f1(x1), x1) = -0.651151
f11(x1) := d/dx1(f1(x1))  # Вторая производная
# Меньше нуля, следовательно - это точка максимума
f11(v1) = -0.984922
F2(x) := 0.5*x^5 - 2*x^4 + 3*x^3 - 7*x + 8
f2(x) := d/dx(F2(x))
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x1 := -1
x2 := 2
v2 := root(f2(x1), x1) = -0.671931
v22 := root(f2(x2), x2) = 1.63959
f22(x) := d/dx(f2(x))
# точка максимума
f22(v2) = -25.9643
f22(v22) = 9.07086  # точка минимума
F3(x) := x^3/3*e^(-x^2)
f3(x) := d/dx(F3(x))
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x1 := -1
x2 := 0
x3 := 1
v3 := root(f3(x1), x1) = -1.22474
v33 := root(f3(x2), x2) = -4.1531e-18
v333 := root(f3(x3), x3) = 1.22474
f33(x) := d/dx(f3(x))
# точка минимума
f33(v3) = 0.546555
# точка максимума
f33(v333) = -0.546555
f33(v33) = 9.18508e-18  # не является экстремумом
F4(x) := nthroot(x^2/(1 + x^4), 3)
f4(x) := d/dx(F4(x))
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x1 := -1
x2 := 0
x3 := 1
v4 := root(f4(x1), x1) = -1
v44 := root(f4(x2), x2) = 0
v444 := root(f4(x3), x3) = 1
f44(x) := d/dx(f4(x))
f44(v4) = -1.05827  # точка максимума
f44(v44) = -4.69054e-15  # не является экстремумом
f44(v444) = -1.05827  # точка максимума
# Задание 2.
# [area: 2 Заданине]
g1(x) := x/(x - 1)
gf1(y) := g1(y) series, y == 2, 3 → 4 - y + (y - 2)^2
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g1(2) = 2
g1(2) = 2
py1(x) := d/dx(g1(x))
py1(2) = -1
py11(x) := d/dx(py1(x))
py11(2) = 2
py111(x) := d^2/dx^2(py1(x))
py111(2) = -6
2 - 1*(x - 2) + 2*(x - 2)^2/2 + (-6*(x - 2)^3/(2*3))
g2(x) := asin(x)
gf2(y) := g2(y) series, y == 0, 3 → y + y^3/6
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g2(0) = 0
py2(x) := d/dx(g2(x))
py2(0) = 1
py22(x) := d/dx(py1(x))
py22(0) = -2
py222(x) := d^2/dx^2(py2(x))
py222(0) = 1
0 + 1*x + (-2*x^2/2) + 1*x^3/(2*3)
g3(x) := 1/sqrt(x)
gf3(y) := g3(y) series, y == 1, 3 → 3/2 - y/2 + 3*(y - 1)^2/8
g3(1) = 1
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py3(x) := d/dx(g3(x))
py3(1) = -0.5
py33(x) := d/dx(py3(x))
py33(1) = 0.75
py333(x) := d^2/dx^2(py3(x))
py333(1) = -1.875
1 - 0.5*(x - 1) + 0.75*(x - 1)^2/2 + (-1.875*(x - 1)^3/(2*3))
