Задание 1
1.1
A := [1, 1, 0; 2, -2, 3; 4, 1, 3]
B := [1, 0, 0; 0, 1, 0; 0, 0, 1]
C := [-1, 3, 2; 1, 0, 1; 5, 7, 1]
A^-1 = [3, 1, -1; -2, -1, 1; -3.33333, -1, 1.33333]
D := A + (B + C)^-1*C → [31/13, 5/13, -1/13; 23/13, -3/13, 37/13; 50/13, -2/13, 55/13]
1.2
A := [2, -2, 1; -1, -1, 7; 1, -4, 2]
b := [4; 16; -3]
# Метод Крамера
D := |A|
D = 39
D1 := [4, -2, 1; 16, -1, 7; -3, -4, 2]
D2 := [2, 4, 1; -1, 16, 7; 1, -3, 2]
D3 := [2, -2, 4; -1, -1, 16; 1, -4, -3]
|D1| = 143
|D2| = 129
|D3| = 128
x := |D1|/|A|
y := |D2|/|A|
z := |D3|/|A|
x = 3.66667
y = 3.30769
z = 3.28205
Isolve
lsolve(A, b) = [3.66667; 3.30769; 3.28205]
Givеn
x := 0
y := 0
z := 0
Given
2*x - 2*y + z == 4
-x - y + 7*z == 16
x - 4*y + 2*z == -3
Find(x, y, z) → [11/3; 43/13; 128/39]
# Обратная матрица
A := [2, -2, 1; -1, -1, 7; 1, -4, 2]
b := [4; 16; -3]
x := A^-1*b → [11/3; 43/13; 128/39]
1.3
V := [0; 2; 1]
W := [3, 2, 1]
A := [5, 8; 3, 4; 0, 0; 6, 1; 5, 8]
B := [4, 2, 9, 1, 3; 2.6, 1.9, 0.4, 8, 3.7; 15, 6, 2.6, 5, 0]
V*W → [0, 0, 0; 6, 4, 2; 3, 2, 1]
V*transpose(W) → 5
W*V → 5
W*B → [32.2, 15.8, 30.4, 24, 16.4]
B*A → [47, 65; 85.2, 66.0; 123, 149]
Задание 2
2.1
ORIGIN := 1
f(x) := x^3/3*e^(-x^2)
start := -3
end := 3
step := 0.5
n := start, start + step .. end
t := (end - start)/step + 1
n = [-3; -2.5; -2; -1.5; -1; -0.5; 0; 0.5; 1; 1.5; 2; 2.5; 3]
f(n) = [-0.00111069; -0.0100544; -0.0488417; -0.118574; -0.122626; -0.03245; 0; 0.03245; 0.122626; 0.118574; 0.0488417; 0.0100544; 0.00111069]
i := 2, 3 .. t
j := 1, 2 .. t
M[1, 1] := start
M[i, 1] := M[i - 1, 1] + step
M[j, 2] := f(M[j, 1])
M = [
    -3, -0.00111069;
    -2.5, -0.0100544;
    -2, -0.0488417;
    -1.5, -0.118574;
    -1, -0.122626;
    -0.5, -0.03245;
    0, 0;
    0.5, 0.03245;
    1, 0.122626;
    1.5, 0.118574;
    2, 0.0488417;
    2.5, 0.0100544;
    3, 0.00111069
]
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2.2
f(x) := sin(x^2)
start := -5
end := 5
step := 0.2
n := start, start + step .. end
n = [
    -5; -4.8; -4.6; -4.4; -4.2; -4; -3.8; -3.6; -3.4; -3.2
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]
f(n) = [
    -0.132352; -0.866851; 0.738706; 0.488565; -0.935459; -0.287903; 0.954495; 0.383543; -0.844896; -0.727878
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]
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Задание 3
a := -4
b := 4
h := 1
n := (b - a)/h
i := 1 .. n
x[0] := a  # error: Индекс массива является недопустимым для этого массива.
x[i] := x[i - 1] + h  # error: Индекс массива является недопустимым для этого массива.
f(x) := 1/(1 + x^2)
L(xx) := sum(f(x[i])*product(if(j == i, 1, (xx - x[j])/(x[i] - x[j])), j = 0 .. n), i = 0 .. n)  # error: Эта переменная не определена.
x =  # error: Эта переменная не определена.
f(x) =  # error
s := cspline(x, f(x))  # error: Эта переменная не определена.
A(t) := interp(s, x, f(x), t)  # error: Эта переменная не определена.
start := -4
end := 4
step := 1
n := start, start + step .. end
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