# Задание 1
1.1
a
F(x) := integral(1/cos(4*x)^2, x) → tan(4*x)/4
b
F(x) := integral(1/nthroot(5^x, 3), x) → -3/(5^(x/3)*ln(5))
c
F(x) := integral(sin(x/2)^2, x) → x/2 - sin(x)/2
d
F(x) := integral(1/(x^2 + 4), x) → atan(x/2)/2
1.2
a
integral(x^3, x = -1 .. 2) = 3.75
b
integral((2 + 5*nthroot(x, 3))/x^3, x = 1 .. 8) = 3.89063
c
integral(nthroot(x - 1, 3), x = 2 .. 9) = 11.25
d
integral(1/cos(x)^2, x = -π/4 .. 0) = 1
1.3
а
f(x) := x^2
a := -1
b := 1
integral(f(x), x = a .. b)/(b - a) = 0.333333
b
f(x) := sin(x)
a := 0
b := π
integral(f(x), x = a .. b)/(b - a) = 0.63662
c
f(x) := 1/(1 + x^2)
a := -3
b := 5
integral(f(x), x = a .. b)/(b - a) = 0.327806
1.4
f1(x) := sqrt(8 - x^2)
f2(x) := sqrt(2*x)
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x := 0
Given
x^2 + 2*x - 8 == 0
x0 := Find(x)
x0 = 2
a := 0
b := x0
S := 2*(integral(f(x), x = a .. b) + integral(f2(x), x = b .. sqrt(8))) = 5.85053
1.5
f(x) := x^2
g(x) := d/dx(f(x)) → 2*x
L := integral(sqrt(1 + g(x)^2), x = 0 .. 4) = 16.8186
f(x) := sin(x)
g(x) := d/dx(f(x)) → cos(x)
L := integral(sqrt(1 + g(x)^2), x = 0 .. 2*π) = 7.6404
f(x) := tan(x)
g(x) := d/dx(f(x)) → tan(x)^2 + 1
L := integral(sqrt(1 + g(x)^2), x = -1.5 .. 1.5) = 28.8976
# Задание 2
k := 40
R := 10
i := 0 .. k
j := 0 .. k
ϕ[i] := i*π/k
θ[j] := j*2*π/k
X[i, j] := R*sin(ϕ[i])*cos(θ[j])
Y[i, j] := R*sin(ϕ[i])*sin(θ[j])
Z[i, j] := R*cos(ϕ[i])
# [component: inputs (X, Y, Z)]
# [component: inputs (X, Y, Z)]
# [component: inputs (X, Y, Z)]
# [component: inputs (X, Y, Z)]
# [component: inputs (X, Y, Z)]
# [component: inputs (X, Y, Z)]
k := 40
i := 0 .. k
a := 4
j := 0 .. k
b := 2
ϕ[i] := i*π/k
c := 10
θ[j] := j*2*π/k
X[i, j] := a*sin(ϕ[i])*cos(θ[j])
Y[i, j] := b*sin(ϕ[i])*sin(θ[j])
Z[i, j] := c*cos(ϕ[i])
# [component: inputs (X, Y, Z)]
# [component: inputs (X, Y, Z)]
# [component: inputs (X, Y, Z)]
# [component: inputs (X, Y, Z)]
# [component: inputs (X, Y, Z)]
# [component: inputs (X, Y, Z)]
1.3
а
f(x) := 2/x
a := 1
b := 8
V := π*integral(f(x)^2, x = a .. b)
V = 10.9956
б
a := 1
b := 2
R := a + b
r := b - a
V := 2*π^2*R*r^2 = 59.2176
V := π*integral((R + sqrt(r^2 - x^2))^2 - (R - sqrt(r^2 - x^2))^2, x = -r .. r) → 6*π^2 = 59.2176
