f(x, y) := 3*x^2 + 2*y^2 - 2*x*y + 3*x
gx(x) := d/dx(f(x, y))  # error: Эта переменная не определена.
N := 50
ax := -5
b := 0.2
gy(y) := d/dy(f(x, y))  # error: Эта переменная не определена.
i := 0 .. N
j := 0 .. N
ay := -5
x[i] := ax + b*i
y[j] := ay + b*j
M[i, j] := f(x[i], y[j])
# [component: inputs M]
# [component: inputs M]
